*Heading
** Job name: Job-1 Model name: Model-1
** Generated by: Abaqus/CAE 2018
*Preprint, echo=NO, model=NO, history=NO, contact=NO
**
** PARTS
**
*Part, name=liver_m_simp
*Node
      1,  0.113199346,  0.180000007,  0.402568132
      2,  0.161377341,  0.177563876,  0.352804929
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*Element, type=DC3D4
  1, 211, 611, 542, 233
  2, 611, 612, 452, 541
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*Nset, nset=_PickedSet28, internal, generate
    1,  1523,     1
*Elset, elset=_PickedSet28, internal, generate
    1,  7828,     1
*Elset, elset=BodyHFlux, generate
 648,  834,    1
*Elset, elset=Perfu, generate
   1,  647,    1
*Nset, nset=FixT
  68,  69,  92,  93,  94,  95
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*Elset, elset=Metabo, generate
    1,  7828,     1
*Nset, nset=T0, generate
    1,  1523,     1
** Section: Section-1
*Solid Section, elset=_PickedSet28, material=Material-1
,
*End Part
**
**
** ASSEMBLY
**
*Assembly, name=Assembly
**
*Instance, name=liver_m_simp-1, part=liver_m_simp
*End Instance
**
*End Assembly
**
** MATERIALS
**
*Material, name=Material-1
*Conductivity
 0.518,
*Density
1060.,
*Specific Heat
3700.,
**
** PREDEFINED FIELDS
**
** Name: T0   Type: Temperature
*Initial Conditions, type=TEMPERATURE
liver_m_simp-1.T0, 36.7
** ----------------------------------------------------------------
**
** STEP: Step-1
**
*Step, name=Step-1, nlgeom=NO, inc=10000
*Heat Transfer, end=PERIOD
0.1, 60., , ,
**
** BOUNDARY CONDITIONS
**
** Name: FixT Type: Temperature
*Boundary
liver_m_simp-1.FixT, 11, 11, 36.7
**
** LOADS
**
** Name: BodyHFlux   Type: Body heat flux
*Dflux
liver_m_simp-1.BodyHFlux, BF, 2e+06
** Name: Metabolic   Type: Body heat flux
*Dflux
liver_m_simp-1.Metabo, BF, 33800.
**
** OUTPUT REQUESTS
**
*Restart, write, frequency=0
**
** FIELD OUTPUT: F-Output-1
**
*Output, field, variable=PRESELECT
*Output, history, frequency=0
*End Step
